@DSL Implicit;

@Behaviour Plasticity;
@Author Thomas Helfer;
@Date 14 / 04 / 2020;
@Description {
}

@Algorithm NewtonRaphson;
@Epsilon 1.e-14;
@Theta 1.;

@Brick StandardElastoViscoPlasticity{
  stress_potential : "Hooke" {young_modulus : 150e9, poisson_ratio : 0.3},
  inelastic_flow : "Plastic" {
    criterion : "Mises",
    isotropic_hardening : "Voce" {R0 : 230e6, Rinf : 320e6, b : 400}
  }
};
